*Heading
** Job name: Job-6 Model name: VoxelizedDiffusionModel
** Generated by: Abaqus/CAE 2024
*Preprint, echo=NO, model=NO, history=NO, contact=NO
**
** PARTS
**
*Part, name=Cuboid
*Node
      1,           5.,           5.,           5.
      2,           5.,   4.80000019,           5.
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*Element, type=DC3D8
    1,   677,   678,   704,   703,     1,     2,    28,    27
    2,   678,   679,   705,   704,     2,     3,    29,    28
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*Nset, nset=Matrix_Set, generate
     1,  17576,      1
*Elset, elset=Matrix_Set, generate
     1,  15625,      1
*Elset, elset=Inclusion_Set_0
  6032,  6033,  6034,  6056,  6057,  6058
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*Elset, elset=Inclusion_Set_1
 11692, 11693, 12292, 12293, 12316, 12317, 12318, 12342, 12343, 12917, 12942, 12943
*Elset, elset=Inclusion_Set_2
 13455, 13456, 13457, 13480, 13481, 13482, 14080, 14081, 14082, 14105, 14106
*Elset, elset=Inclusion_Set_3
 10609, 10610, 11210, 11211, 11234, 11235, 11236, 11835, 11860
*Elset, elset=Inclusion_Set_4
 1862, 2462, 2486, 2487, 2488, 3112, 3113
*Elset, elset=Inclusion_Set_5
 12362, 12363, 12387, 12388, 12962, 12963, 12987, 12988, 13012, 13013
*Elset, elset=Inclusion_Set_7
  567,  568,  592,  593, 1192, 1193, 1217, 1218
*Elset, elset=Inclusion_Set_8
 15556, 15557, 15580, 15581, 15582, 15606
*Elset, elset=Inclusion_Set_9
 3621, 3622, 3623, 3647, 4222, 4246, 4247, 4248, 4271, 4272, 4273
** Region: (Matrix_Section:Matrix_Set)
*Elset, elset=_I1, internal
     1,     2,     3,     4,     5,     6
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** Section: Matrix_Section
*Solid Section, elset=_I1, material=Matrix_Material
,
** Section: Inclusion_Section_0_27
*Solid Section, elset=Inclusion_Set_7, material=Inclusion_Material_0_27
,
** Section: Inclusion_Section_0_27
*Solid Section, elset=Inclusion_Set_4, material=Inclusion_Material_0_27
,
** Section: Inclusion_Section_0_27
*Solid Section, elset=Inclusion_Set_9, material=Inclusion_Material_0_27
,
** Section: Inclusion_Section_1_23
*Solid Section, elset=Inclusion_Set_0, material=Inclusion_Material_1_23
,
** Section: Inclusion_Section_0_27
*Solid Section, elset=Inclusion_Set_3, material=Inclusion_Material_0_27
,
** Section: Inclusion_Section_0_27
*Solid Section, elset=Inclusion_Set_1, material=Inclusion_Material_0_27
,
** Section: Inclusion_Section_0_27
*Solid Section, elset=Inclusion_Set_5, material=Inclusion_Material_0_27
,
** Section: Inclusion_Section_0_27
*Solid Section, elset=Inclusion_Set_2, material=Inclusion_Material_0_27
,
** Section: Inclusion_Section_0_27
*Solid Section, elset=Inclusion_Set_8, material=Inclusion_Material_0_27
,
*End Part
**
**
** ASSEMBLY
**
*Assembly, name=Assembly
**
*Instance, name=Cuboid-1, part=Cuboid
*End Instance
**
*Nset, nset=All_Nodes, instance=Cuboid-1, generate
     1,  17576,      1
*Nset, nset=Back_Face_Set, instance=Cuboid-1, generate
     1,  17551,     26
*Elset, elset=Back_Face_Set, instance=Cuboid-1, generate
     1,  15601,     25
*Nset, nset=Bottom_Face, instance=Cuboid-1
   651,   652,   653,   654,   655,   656
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*Elset, elset=Bottom_Face, instance=Cuboid-1
   601,   602,   603,   604,   605,   606
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*Nset, nset=Front_Face_Set, instance=Cuboid-1, generate
    26,  17576,     26
*Elset, elset=Front_Face_Set, instance=Cuboid-1, generate
    25,  15625,     25
*Nset, nset=Left_Face_Set, instance=Cuboid-1, generate
 16901,  17576,      1
*Elset, elset=Left_Face_Set, instance=Cuboid-1, generate
 15001,  15625,      1
*Nset, nset=Right_Face_Set, instance=Cuboid-1, generate
   1,  676,    1
*Elset, elset=Right_Face_Set, instance=Cuboid-1, generate
   1,  625,    1
*Nset, nset=TOP_FACE_NODES, instance=Cuboid-1
     1,     2,     3,     4,     5,     6
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*Nset, nset=Top_Face, instance=Cuboid-1
     1,     2,     3,     4,     5,     6
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*Elset, elset=Top_Face, instance=Cuboid-1
     1,     2,     3,     4,     5,     6
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*Elset, elset=_TOP_FACE_SURFACE_S3, internal, instance=Cuboid-1
     1,     2,     3,     4,     5,     6
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*Surface, type=ELEMENT, name=TOP_FACE_SURFACE
_TOP_FACE_SURFACE_S3, S3
*End Assembly
**
** MATERIALS
**
*Material, name=Inclusion_Material_0_27
*Diffusivity
 0.00027,
*Solubility
 0.74325,
*Material, name=Inclusion_Material_1_23
*Diffusivity
 0.00123,
*Solubility
 0.71925,
*Material, name=Matrix_Material
*Diffusivity
 0.0001,
*Solubility
 0.5,
**
** PREDEFINED FIELDS
**
** Name: Initial_Concentration   Type: Temperature
*Initial Conditions, type=TEMPERATURE
All_Nodes, 0.
** ----------------------------------------------------------------
**
** STEP: DiffusionStep
**
*Step, name=DiffusionStep, nlgeom=NO, inc=100000
*Mass Diffusion, end=SS, dcmax=0.8
10., 100000., 1e-05, 100., 0.001
**
** BOUNDARY CONDITIONS
**
** Name: Bottom_Concentration Type: Normalized concentration
*Boundary
Bottom_Face, 11, 11
** Name: Top_Concentration Type: Normalized concentration
*Boundary
Top_Face, 11, 11, 100.
**
** OUTPUT REQUESTS
**
*Restart, write, frequency=0
**
** FIELD OUTPUT: F-Output-1
**
*Output, field, frequency=10
*Node Output
NNC,
*Element Output, directions=YES
CONC, MFL, MFLT
**
** HISTORY OUTPUT: H-Output-1
**
*Output, history, variable=PRESELECT
*End Step
